*Heading
** simulation of free-swelling of 3D cylinder
** the dimension of the cylinder is 10 mm (height) x 5 mm (diameter)
** an octant of the 3D cylinder is modeled using U2 (HEX8) element
** It starts from the dry state to a swollen equilibrium state
************************************************************************
** PARAMETERS (SI UNIT SYSTEM)
************************************************************************
*Parameter
** geometric parameters
nDim        = 3
nStress     = 6
nnode       = 8
nInt        = 8
fbar        = 1
matID       = 1
matProps    = 12
intProps    = 4
nstatev     = 1
nsvars      = nstatev*nInt
nPostVars   = 2*nStress + nstatev
** physical constants and material properties
Rgas    = 8.3145
theta   = 25.0 + 273.0
phi0    = 0.999
rho     = 1100.0
Gshear  = 100.0e3
kappa   = 50.0*Gshear
lam_L   = 0.
Vp      = 8.928e-3
mu0     = 0.0
Vw      = 1.8e-5
chi     = 0.485
Dw      = 1.7e-6
RT      = Rgas*theta
** initial condition
initMU  = mu0 + RT*(phi0+log(1-phi0)+chi*phi0**2) - kappa*Vw*log(phi0) + 0.5*kappa*Vw*(log(phi0))**2
** physical constants and material properties
tRamp   = 3600.0*3.0
tEnd    = 3600.0*24.0
dtInit  = 10.0
dtMax   = 500.0
dtMin   = 1.0e-6
************************************************************************
** GEOMETRY and MESH
************************************************************************
*Node
1, 0.00191176473,           0.,           0.
2,           0.,           0.,           0.
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*User Element,Type=U2,Nodes=<nnode>,Coordinates=<nDim>,Properties=<matProps>,Iproperties=<intProps>,Variables=<nsvars>,Unsymm
1,2,3,11
*Element, type=U2
1,   133,  1130,  3641,   770,     1,    22,   482,    69
2,  1130,  1131,  3642,  3641,    22,    23,   483,   482
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*System
*Nset, nset=All, generate
1,  10336,      1
*Elset, elset=All, generate
1,  9009,     1
*Nset, nset=Bottom
1,    2,    3,    4,    9,   10
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*Elset, elset=Bottom
1,    2,    3,    4,    5,    6
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*Nset, nset=Front
1,    2,    5,    6,   13,   14
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*Elset, elset=Front
1,    2,    3,    4,    5,    6
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*Nset, nset=Left
2,    3,    6,    7,    9,   11
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*Elset, elset=Left
13,   26,   39,   52,   65,   78
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*Nset, nset=Outer
9,   10,   11,   12,   13,   14
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*Elset, elset=Outer
2708, 2712, 2716, 2720, 2724, 2728
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*Nset, nset=Top
15,   16,   17,   18,   19,   20
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*Elset, elset=Top
4385, 4402, 4419, 4436, 4453, 4470
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*Element, type=C3D8
100001, 133, 1130, 3641, 770, 1, 22, 482, 69
100002, 1130, 1131, 3642, 3641, 22, 23, 483, 482
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*Elset, elset=ElDummy, generate
100001,109009,1
** EXTRA ELEMENT
*Node
999996, 0.0, 0.0
999997, .00001, 0.0
999998, .00001, .00001
999999, 0.0, .00001
*Element, Type=CPE4T
999999,999996,999997,999998,999999
*Nset, nset=extraElement
999996,999997,999998,999999
*Elset,elset=extraElement
999999
***************************************************************************
** MATERIAL DEFINITION
***************************************************************************
** Material properties for the Swellable Gel Elements
*uel property,elset=all
** Rgas theta phi0 rho Gshear kappa lam_L Vp
<Rgas>, <theta>, <phi0>, <rho>, <Gshear>, <kappa>, <lam_L>, <Vp>,
** mu0 Vw chi Dw nInt fbar matID nPostVars
<mu0>, <Vw>, <chi>, <Dw>, <nInt>, <fbar>, <matID>, <nPostVars>
***************************************************************************
*Solid section, elset=ElDummy, material=DummyMaterial
*Material, name=DummyMaterial
*Elastic
1.e-20
** strain and stress vector (3+3) and polymer vol fraction as user output
*User output variables
<nPostVars>
***************************************************************************
*Solid section, elset=extraElement, material=extraMaterial
*Material, name=extraMaterial
*Elastic
1.e-20
*Conductivity
1.0
*Density
1.0
*Specific heat
1.0
************************************************************************
** INITIAL CONDITIONS
************************************************************************
** Define the initial chemical potential
*Initial conditions, type=temperature
all, <initMU>
** Define an arbitrary initial condition for the ‘‘extra’’ element.
*Initial conditions, type=temperature
extraElement, 0.0
************************************************************************
** AMPLITUDE DEFINITION
************************************************************************
*Amplitude, name=chemProfile, definition=decay
<mu0>, <initMU>, 0.0, <tRamp>
************************************************************************
** STEP DEFINITION
************************************************************************
*Step, Name=Swell, nlgeom=yes, inc=50000, UNSYMM=YES
*Coupled temperature-displacement, stabilize, deltmx=100.0
<dtInit>, <tEnd>, <dtMin>, <dtMax>
*Boundary
left,1,1,0.0
bottom,2,2,0.0
front,3,3,0.0
*Boundary, amplitude=chemProfile
top,11,11,1.0
outer,11,11,1.0
*Boundary
extraElement,encastre
extraElement,11,11,0.0
************************************************************************
*Output, field, frequency=1, time marks=no
*node output, nset=all
u, nt, rf
** specify the user-defined output for the dummy element set
*element output, elset=elDummy
uvarm, le
*End Step
************************************************************************
